OpenVSP model (file version 5), 5 components.
Geometry view with OpenVSP parameter names; values to 6 digits, angles in degrees, lengths in the model's unit.
Overall bounding box: X_Min=-0.0878191 X_Len=5.28782 Y_Min=-4.89385 Y_Len=9.78769 Z_Min=-0.674201 Z_Len=2.06718

Fuselage "SingleSwoopFuselage"
  location (X Y Z) 0 0 0, rotation 0 0 0
  bounding box size 5.2 1.16041 1.60905
  Design: Length=5.2
  cross sections:
    n   XLocPercent  YLocPercent  ZLocPercent  shape
    0   0            0            -0.0576923   point
    1   0.0480769    0            -0.0473654   ellipse Ellipse_Height=0.3542 Ellipse_Width=0.4175
    2   0.0865385    0            -0.0263077   ellipse Ellipse_Height=0.5863 Ellipse_Width=0.6103
    3   0.105769     0            -0.0173077   ellipse Ellipse_Height=0.68 Ellipse_Width=0.66
    4   0.144231     0            -0.00903846  ellipse Ellipse_Height=0.7409 Ellipse_Width=0.6896
    5   0.182692     0            -0.00561538  ellipse Ellipse_Height=0.7215 Ellipse_Width=0.666
    6   0.21875      0            -0.00251923  ellipse Ellipse_Height=0.6988 Ellipse_Width=0.6444
    7   0.25         0            0.00480769   ellipse Ellipse_Height=0.75 Ellipse_Width=0.68
    8   0.28125      0            0.0178462    ellipse Ellipse_Height=0.9798 Ellipse_Width=0.8356
    9   0.3125       0            0.0358846    ellipse Ellipse_Height=1.3176 Ellipse_Width=1.0424
    10  0.375        0            0.0467115    ellipse Ellipse_Height=1.4472 Ellipse_Width=1.0942
    11  0.432692     0            0.0519231    ellipse Ellipse_Height=1.5 Ellipse_Width=1.1
    12  0.471154     0            0.0601923    ellipse Ellipse_Height=1.5212 Ellipse_Width=1.0707
    13  0.519231     0            0.0701923    ellipse Ellipse_Height=1.47 Ellipse_Width=1
    14  0.576923     0            0.0765385    ellipse Ellipse_Height=1.3669 Ellipse_Width=0.9217
    15  0.644231     0            0.0846731    ellipse Ellipse_Height=1.2053 Ellipse_Width=0.8044
    16  0.711538     0            0.0946923    ellipse Ellipse_Height=1.0097 Ellipse_Width=0.6586
    17  0.778846     0            0.105558     ellipse Ellipse_Height=0.8394 Ellipse_Width=0.5328
    18  0.846154     0            0.115635     ellipse Ellipse_Height=0.6788 Ellipse_Width=0.4189
    19  0.903846     0            0.116019     ellipse Ellipse_Height=0.4835 Ellipse_Width=0.2964
    20  0.951923     0            0.112731     ellipse Ellipse_Height=0.2725 Ellipse_Width=0.1727
    21  1            0            0.107692     point

Wing "MainWing", child of "SingleSwoopFuselage"
  location (X Y Z) 2.25 0 1.1, rotation 0 0 0
  symmetric about XZ
  bounding box size 0.600188 9.78769 0.310396
  totals: TotalSpan=9.8 TotalProjectedSpan=9.78657 TotalChord=0.485 TotalArea=4.753 TotalAR=20.1508 MAC=0.494089
  root: chord 0.6, twist 0, NACA 4-series Camber=0.04 CamberLoc=0.4 ThickChord=0.12
  sections:
    n  Span  Root_Chord  Tip_Chord  Area    Sweep  Sweep_Location  Dihedral  Twist  Twist_Location  tip airfoil
    1  4.9   0.6         0.37       2.3765  1      0               3         0      0.25            as above

Wing "HorizTail", child of "SingleSwoopFuselage"
  location (X Y Z) 4.45 0 0.92, rotation 0 0 0
  symmetric about XZ
  bounding box size 0.352433 1.6 0.0300174
  totals: TotalSpan=1.6 TotalProjectedSpan=1.6 TotalChord=0.27 TotalArea=0.432 TotalAR=5.92593 MAC=0.271111
  root: chord 0.3, twist 0, NACA 4-series Camber=0 CamberLoc=0.2 ThickChord=0.1
  sections:
    n  Span  Root_Chord  Tip_Chord  Area   Sweep  Sweep_Location  Dihedral  Twist  Twist_Location  tip airfoil
    1  0.8   0.3         0.24       0.216  8      0               0         0      0.25            as above

Wing "VertTail", child of "SingleSwoopFuselage"
  location (X Y Z) 4.4 0 0.5, rotation 90 0 0
  bounding box size 0.454779 0.0400232 0.7
  totals: TotalSpan=0.7 TotalProjectedSpan=0.7 TotalChord=0.3 TotalArea=0.21 TotalAR=2.33333 MAC=0.311111
  root: chord 0.4, twist 0, NACA 4-series Camber=0 CamberLoc=0.2 ThickChord=0.1
  sections:
    n  Span  Root_Chord  Tip_Chord  Area  Sweep  Sweep_Location  Dihedral  Twist  Twist_Location  tip airfoil
    1  0.7   0.4         0.2        0.21  20     0               0         0      0.25            as above

Propeller "PropDisk", child of "SingleSwoopFuselage"
  location (X Y Z) -0.06 0 -0.18, rotation 0 0 0
  bounding box size 0.0546666 0.863797 0.988403
  Design: Diameter=1.1 NumBlade=3 Beta34=20 UseBeta34Flag=1 Feather=0 Rotate=0 Precone=0 ReverseFlag=0 FoldAngle=0 PropMode=0 AF=151.538 CLi=0.538798 Chord=0.177656 Solidity=0.169649 ConstructXoC=0.5 FeatherAxisXoC=0.5 FeatherOffsetXoC=0
  cross sections:
    n  RadiusFrac  shape
    0  0.2         ellipse Ellipse_Height=0.022 Ellipse_Width=0.044
    1  0.4         NACA 16-series Chord=0.0914375 IdealCl=0.7 ThickChord=0.144074
    2  1           NACA 16-series Chord=0.0715 IdealCl=0.2 ThickChord=0.03
  Chord along r/R (cubic Bezier): 0.2: 0.08, 0.333333: 0.15, 0.466667: 0.2, 0.6: 0.2, 0.716667: 0.2, 0.833333: 0.2, 0.95: 0.2, 0.966667: 0.2, 0.983333: 0.2, 1: 0.13
  Twist along r/R (PCHIP): 0.2: 46.75, 0.75: 20, 1: 13
  Thick along r/R (cubic Bezier): 0.2: 0.5, 0.233333: 0.3, 0.266667: 0.225, 0.3: 0.2, 0.4: 0.125, 0.5: 0.115, 0.6: 0.1, 0.733333: 0.075, 0.866667: 0.055, 1: 0.03
  CLI along r/R (cubic Bezier): 0.2: 0, 0.266667: 0.7, 0.333333: 0.7, 0.4: 0.7, 0.466667: 0.7, 0.533333: 0.7, 0.6: 0.7, 0.733333: 0.7, 0.866667: 0.7, 1: 0.2
